!!!!!!!!!!!!!!!!!!!!!!!!!!!!!!!!!!!!!!!!!!!!!!!
!
!                КС "Балашовская" ГПА
!
!!!!!!!!!!!!!!!!!!!!!!!!!!!!!!!!!!!!!!!!!!!!!!!

finish
/clear
/filnam, bal, 1

*ulib,_mymac1,mlib

*use,nachalo

*use, svoistva

_raspar

visota_opori_pod_zemlei=0.50

!> геометрия

!!!!!!!!!!!!!!!!!!!!!!!!!!!!!!!!!!!!!!!!!!!!!!!!!!!!!!!!!!!!!!!!!!!!!!!!!!!!!!!!!!!!!!!!!!!!!!!!!!!!!!!!!!!!!!!!!!!!!!!!!!!!!!!!!!!!!!!!!!!!!!!!!!!!!!!!
!!!!!
!!!!!							Г Е О М Е Т Р И Я
!!!!!
!!!!!!!!!!!!!!!!!!!!!!!!!!!!!!!!!!!!!!!!!!!!!!!!!!!!!!!!!!!!!!!!!!!!!!!!!!!!!!!!!!!!!!!!!!!!!!!!!!!!!!!!!!!!!!!!!!!!!!!!!!!!!!!!!!!!!!!!!!!!!!!!!!!!!!!!


POPT, nc

!> рециркуляция

BRANCH, , ,5 ,

x = 0
y = 0
z = 0

*use, pipespec, 1

x = 2
*use, otvod
x = 2.75
y = 2.75
*use, otvod
z = 2
*use, end

/eof


!>

!!!!!!!!!!!!!!!!!!!!!!!!!!!!!!!!!!!!!!!!!!!!!!!!!!!!!!!!!!!!!!!!!!!!!!!!!!!!!!!!!!!!!!!!!!!!!!!!!!!!!!!!!!!!!!!!!!!!!!!!!!!!!!!!!!!!!!!!!!!!!!!!!!
!!!!
!!!!                                      Г Р А Н И Ч Н Ы Е   У С Л О В И Я
!!!!
!!!!!!!!!!!!!!!!!!!!!!!!!!!!!!!!!!!!!!!!!!!!!!!!!!!!!!!!!!!!!!!!!!!!!!!!!!!!!!!!!!!!!!!!!!!!!!!!!!!!!!!!!!!!!!!!!!!!!!!!!!!!!!!!!!!!!!!!!!!!!!!!!!
!!!!!!!!!!!!!!!!!!!!!!!!!!!!!!!!!!!!!!!!!!!!!!!!!!!!!!!!!!!!!!!!!!!!!!!!!!!!!!!!!!!!!!!!!!!!!!!!!!!!!!!!!!!!!!!!!!!!!!!!!!!!!!!!!!!!!!!!!!!!!!!!!!

*do,k,1,i,1
d,opora2(k),uy
*enddo

!<
!> obrezki kollektorov

d, a1, all
d, a2, all
d, b1, all
d, b2, all
d, c1, all
d, c2, all

!<

!> flanci GPA

d, agrvh, all
d, agrvih, all


!<
!> nagruzki

FLST,5,141,2,ORDE,4
FITEM,5,68
FITEM,5,-172
FITEM,5,233
FITEM,5,-268
ESEL,U, , ,P51X


esel, all

FLST,5,215,2,ORDE,2
FITEM,5,120
FITEM,5,-334
ESEL,S, , ,P51X


sfe, all, , pres,, 5200000


esel, all

FLST,5,119,2,ORDE,2
FITEM,5,1
FITEM,5,-119
ESEL,S, , ,P51X

sfe, all, , pres,, 4480000

esel, all


!sfe, all, , pres,, 5500000


acel,0,9.81,0

uvh = 0
uvih = 0
urec = 0

d, a1, uy, urec
d, a2, uy, urec
d, b1, uy, uvh
d, b2, uy, uvh
d, c1, uy, uvih
d, c2, uy, uvih

!> bez davleniya

/solu

solve

/DSCALE, , 1

FLST,5,42,2,ORDE,6
FITEM,5,1
FITEM,5,-14
FITEM,5,219
FITEM,5,-232
FITEM,5,321
FITEM,5,-334
ESEL,U, , ,P51X

!<
!<
